<?xml version="1.0" encoding="UTF-8"?>
<neuroml xmlns="http://morphml.org/neuroml/schema" xmlns:meta="http://morphml.org/metadata/schema" xmlns:xsi="http://www.w3.org/2001/XMLSchema-instance" xmlns:mml="http://morphml.org/morphml/schema" xmlns:cml="http://morphml.org/channelml/schema" xmlns:bio="http://morphml.org/biophysics/schema" xmlns:net="http://morphml.org/networkml/schema" xsi:schemaLocation="http://morphml.org/neuroml/schema http://www.neuroml.org/NeuroMLValidator/NeuroMLFiles/Schemata/v1.8.1/Level3/NeuroML_Level3_v1.8.1.xsd" lengthUnits="micrometer">

<meta:notes>

Complete network structure generated with project: if_gl saved with neuroConstruct v1.7.0 on: 16:29:40, 06-Dec-13

Cell Group: MFs contains 156 cells
Cell Group: GrCs contains 509 cells

Network connection: MFs_to_GrCs_AMPA contains 941 individual synaptic connections
Network connection: MFs_to_GrCs_NMDA contains 941 individual synaptic connections

</meta:notes>

<meta:properties>
    <meta:property tag="neuroConstruct_random_seed" value="-9223372036854775808"/>

    <meta:property tag="neuroConstruct_sim_config" value="Default Simulation Configuration"/>

    <meta:property tag="neuroConstruct_sim_duration" value="150.0"/>

    <meta:property tag="neuroConstruct_sim_time_step" value="0.025"/>

    <meta:property tag="neuroConstruct_temperature" value="35.0"/>
</meta:properties>

<cells>
    <cell name="ExcCell">

            <meta:notes>Dummy relay for random spike trains. Don't forget to use FastSynInput together with a large leak conductance and a high outbound synaptic threshold, to ensure that no spikes go missing due to EPSC summation.</meta:notes>

            <mml:segments>

                <mml:segment id="0" name="Soma" cable="0">
                    <mml:proximal x="0.0" y="0.0" z="0.0" diameter="10.0"/>
                    <mml:distal x="0.0" y="0.0" z="0.0" diameter="10.0"/>
                </mml:segment>

            </mml:segments>

            <mml:cables>

                <mml:cable id="0" name="Soma">
                    <meta:group>all</meta:group>
                    <meta:group>soma_group</meta:group>
                </mml:cable>

            </mml:cables>

                <!--Adding the biophysical parameters-->

            <biophysics units="Physiological Units">

                <bio:mechanism name="LeakConductance" type="Channel Mechanism" passive_conductance="true">
                    <bio:parameter name="e" value="-75.0">
                        <bio:group>all</bio:group>
                    </bio:parameter>
                    <bio:parameter name="gmax" value="318.3092">
                        <bio:group>all</bio:group>
                    </bio:parameter>
                </bio:mechanism>

                <bio:spec_capacitance>
                    <bio:parameter value="1.0">
                        <bio:group>all</bio:group>
                    </bio:parameter>
                </bio:spec_capacitance>

                <bio:spec_axial_resistance>
                    <bio:parameter value="1.0E-4">
                        <bio:group>all</bio:group>
                    </bio:parameter>
                </bio:spec_axial_resistance>

                <bio:init_memb_potential>
                    <bio:parameter value="-65.0">
                        <bio:group>all</bio:group>
                    </bio:parameter>
                </bio:init_memb_potential></biophysics>

            <connectivity>
                <net:potential_syn_loc synapse_type="AMPA_direct">
                    <net:group>all</net:group>
                </net:potential_syn_loc>

                <net:potential_syn_loc synapse_type="AMPA_spillover">
                    <net:group>all</net:group>
                </net:potential_syn_loc>

                <net:potential_syn_loc synapse_type="FastSynInput">
                    <net:group>all</net:group>
                </net:potential_syn_loc>

                <net:potential_syn_loc synapse_type="NMDA">
                    <net:group>all</net:group>
                </net:potential_syn_loc>

                <net:potential_syn_loc synapse_type="RothmanMFToGrCAMPA">
                    <net:group>all</net:group>
                </net:potential_syn_loc>

                <net:potential_syn_loc synapse_type="RothmanMFToGrCNMDA">
                    <net:group>all</net:group>
                </net:potential_syn_loc>
            </connectivity>

        </cell>
    <cell name="IaF_GrC">

            <meta:notes>A single segment/compartment cell with a passive conductance and an integrate and fire mechanism which resets the membrane potential on reaching a threshold*** NOTE: cell behaviour is based on NeuroML 2 Abstract cell definition in the single Cell Mechanism placed on this cell. Capacitance will be taken from that file if present in the model***</meta:notes>

            <mml:segments>

                <mml:segment id="0" name="Soma" cable="0">
                    <mml:proximal x="0.0" y="0.0" z="0.0" diameter="10.0"/>
                    <mml:distal x="0.0" y="0.0" z="0.0" diameter="10.0"/>
                </mml:segment>

            </mml:segments>

            <mml:cables>

                <mml:cable id="0" name="Soma">
                    <meta:group>all</meta:group>
                    <meta:group>soma_group</meta:group>
                </mml:cable>

            </mml:cables>

                <!--Adding the biophysical parameters-->

            <biophysics units="Physiological Units">

                <bio:mechanism name="IaF_GrC" type="Channel Mechanism">
                    <bio:parameter name="gmax" value="0.0">
                        <bio:group>all</bio:group>
                    </bio:parameter>
                </bio:mechanism>

                <bio:spec_capacitance/>

                <bio:spec_axial_resistance>
                    <bio:parameter value="0.03">
                        <bio:group>all</bio:group>
                    </bio:parameter>
                </bio:spec_axial_resistance>

                <bio:init_memb_potential>
                    <bio:parameter value="-75.0">
                        <bio:group>all</bio:group>
                    </bio:parameter>
                </bio:init_memb_potential></biophysics>

            <connectivity>
                <net:potential_syn_loc synapse_type="RothmanMFToGrCAMPA">
                    <net:group>all</net:group>
                </net:potential_syn_loc>

                <net:potential_syn_loc synapse_type="RothmanMFToGrCNMDA">
                    <net:group>all</net:group>
                </net:potential_syn_loc>
            </connectivity>

        </cell>
</cells>

<channels units="Physiological Units">
    <channel_type name="LeakConductance" density="yes" xmlns="http://morphml.org/channelml/schema">

        <status value="stable"/>

        <meta:notes>Leak conductance for the integrate-and-fire model of the granule cell.</meta:notes>

        <meta:authorList>
	  <meta:modelAuthor>
            <meta:name>Jason Rothman</meta:name>
            <meta:institution>UCL</meta:institution>
            <meta:email>j.rothman - at - ucl.ac.uk</meta:email>
          </meta:modelAuthor>
          <meta:modelTranslator>
            <meta:name>Eugenio Piasini</meta:name>
            <meta:institution>UCL</meta:institution>
            <meta:email>e.piasini - at - ucl.ac.uk</meta:email>
          </meta:modelTranslator>
        </meta:authorList>

        <current_voltage_relation cond_law="ohmic" ion="non_specific" default_erev="-75" default_gmax="0.3183092"/>

    </channel_type>
</channels>

<populations xmlns="http://morphml.org/networkml/schema">
    <population name="MFs" cell_type="ExcCell">
        <meta:properties>

        </meta:properties>
        <instances size="156">
            <instance id="0">
                <location x="-3.033216" y="3.4960601" z="-16.4215"/>
            </instance>
            <instance id="1">
                <location x="-29.577797" y="-11.73749" z="-21.199335"/>
            </instance>
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        </instances>
    </population>
    <population name="GrCs" cell_type="IaF_GrC">
        <meta:properties>

        </meta:properties>
        <instances size="509">
            <instance id="0">
                <location x="-22.875843" y="-8.119619" z="-5.400076"/>
            </instance>
            <instance id="1">
                <location x="0.0895418" y="-2.3312895" z="-5.2834764"/>
            </instance>
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        </instances>
    </population>
</populations>

<projections units="SI Units" xmlns="http://morphml.org/networkml/schema">
    <projection name="MFs_to_GrCs_AMPA" source="MFs" target="GrCs">
        <synapse_props synapse_type="RothmanMFToGrCAMPA" internal_delay="0.0" weight="1.0" threshold="0.0">
        </synapse_props>
        <connections size="941">
            <connection id="0" pre_cell_id="95" post_cell_id="662">
            </connection>
            <connection id="1" pre_cell_id="95" post_cell_id="219">
            </connection>
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        </connections>
    </projection>
    <projection name="MFs_to_GrCs_NMDA" source="MFs" target="GrCs">
        <synapse_props synapse_type="RothmanMFToGrCNMDA" internal_delay="0.0" weight="1.0" threshold="0.0">
        </synapse_props>
        <connections size="941">
            <connection id="0" pre_cell_id="95" post_cell_id="662">
            </connection>
            <connection id="1" pre_cell_id="95" post_cell_id="219">
            </connection>
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        </connections>
    </projection>
</projections>

    <!--There are no electrical inputs present in the network-->

</neuroml>
