<?xml version="1.0" encoding="UTF-8"?>
<networkml xmlns="http://morphml.org/networkml/schema" xmlns:meta="http://morphml.org/metadata/schema" xmlns:xsi="http://www.w3.org/2001/XMLSchema-instance" xsi:schemaLocation="http://morphml.org/networkml/schema  http://www.neuroml.org/NeuroMLValidator/NeuroMLFiles/Schemata/v1.8.1/Level3/NetworkML_v1.8.1.xsd" lengthUnits="micrometer">

<meta:notes>

Network structure (NeuroML 1.x) for project: if_gl saved with neuroConstruct v1.7.0 on: 16:13:22, 06-Dec-13

Cell Group: MFs contains 156 cells
Cell Group: GrCs contains 509 cells

Network connection: MFs_to_GrCs_AMPA contains 941 individual synaptic connections
Network connection: MFs_to_GrCs_NMDA contains 941 individual synaptic connections

</meta:notes>

<meta:properties>
    <meta:property tag="neuroConstruct_random_seed" value="-9223372036854775808"/>

    <meta:property tag="neuroConstruct_sim_config" value="Default Simulation Configuration"/>

    <meta:property tag="neuroConstruct_sim_duration" value="150.0"/>

    <meta:property tag="neuroConstruct_sim_time_step" value="0.025"/>

    <meta:property tag="neuroConstruct_temperature" value="35.0"/>
</meta:properties>

        <populations>
    <population name="MFs" cell_type="ExcCell">
        <meta:properties>

        </meta:properties>
        <instances size="156">
            <instance id="0">
                <location x="-3.033216" y="3.4960601" z="-16.4215"/>
            </instance>
            <instance id="1">
                <location x="-29.577797" y="-11.73749" z="-21.199335"/>
            </instance>
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        </instances>
    </population>
    <population name="GrCs" cell_type="IaF_GrC">
        <meta:properties>

        </meta:properties>
        <instances size="509">
            <instance id="0">
                <location x="-22.875843" y="-8.119619" z="-5.400076"/>
            </instance>
            <instance id="1">
                <location x="0.0895418" y="-2.3312895" z="-5.2834764"/>
            </instance>
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        </instances>
    </population>
</populations>

        <projections units="Physiological Units">
    <projection name="MFs_to_GrCs_AMPA" source="MFs" target="GrCs">
        <synapse_props synapse_type="RothmanMFToGrCAMPA" internal_delay="0.0" weight="1.0" threshold="0.0">
        </synapse_props>
        <connections size="941">
            <connection id="0" pre_cell_id="95" post_cell_id="662">
            </connection>
            <connection id="1" pre_cell_id="95" post_cell_id="219">
            </connection>
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        </connections>
    </projection>
    <projection name="MFs_to_GrCs_NMDA" source="MFs" target="GrCs">
        <synapse_props synapse_type="RothmanMFToGrCNMDA" internal_delay="0.0" weight="1.0" threshold="0.0">
        </synapse_props>
        <connections size="941">
            <connection id="0" pre_cell_id="95" post_cell_id="662">
            </connection>
            <connection id="1" pre_cell_id="95" post_cell_id="219">
            </connection>
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        </connections>
    </projection>
</projections>

            <!--There are no electrical inputs present in the network-->

</networkml>
